test_geom
0.03                          	| Mach
0 0 0                            | iYsym  iZsym  Zsym
0.611   0.405   1.524	        | Sref   Cref   Bref
0.101   0   0               | Xcg   Ycg   Zcg
0.027                             | CD0

#==============================================================
SURFACE
Wing
#Nchordwise       Cspace   Nspanwise   Sspace
12                1.0      50          1.0

YDUP
0
ANGLE
0
TRANSLATE
0  0   0
#-------------------------------------------------------
SECTION | Wing Root
#Xle     Yle      Zle      chord    Ainc    Nspan    Sspace
0        0        0         0.472      0      50         1

NACA
0012

#Cname   Cgain    Xhinge   HingeVec   SgnDup
CONTROL
Flaps 1.0 0.7 0.131 0.938  0.0 1
#-------------------------------------------------------
SECTION | Wing Mid
#Xle     Yle      Zle      chord    Ainc    Nspan    Sspace
0.018        0.381        0         0.401      0      50         1

NACA
0012

#Cname   Cgain    Xhinge   HingeVec   SgnDup
CONTROL
Flaps 1.0 0.7 0.131 0.938  0.0 1
#Cname   Cgain    Xhinge   HingeVec   SgnDup
CONTROL
Ailerons 1.0 0.7 0.131 0.938  0.0 -1
#-------------------------------------------------------
SECTION | Wing Tip
#Xle     Yle      Zle      chord    Ainc    Nspan    Sspace
0.035        0.762        0         0.33      0      50         1

NACA
0012

#Cname   Cgain    Xhinge   HingeVec   SgnDup
CONTROL
Ailerons 1.0 0.7 0.131 0.938  0.0 -1
#==============================================================
SURFACE
Horizontal
#Nchordwise       Cspace   Nspanwise   Sspace
12                1.0      30          1.0

YDUP
0
ANGLE
0
TRANSLATE
1.067  0   0
#-------------------------------------------------------
SECTION | Horizontal Root
#Xle     Yle      Zle      chord    Ainc    Nspan    Sspace
0        0        0         0.251      0      30         1

NACA
0012

#Cname   Cgain    Xhinge   HingeVec   SgnDup
CONTROL
Elevator 1.0 0.7 0.0 1.0  0.0 1
#-------------------------------------------------------
SECTION | Horizontal Tip
#Xle     Yle      Zle      chord    Ainc    Nspan    Sspace
0.0        0.376        0         0.251      0      30         1

NACA
0012

#Cname   Cgain    Xhinge   HingeVec   SgnDup
CONTROL
Elevator 1.0 0.7 0.0 1.0  0.0 1
#==============================================================
SURFACE
Vertical
#Nchordwise       Cspace   Nspanwise   Sspace
12                1.0      10          1.0

YDUP
0
ANGLE
0
TRANSLATE
1.067  0   0
#-------------------------------------------------------
SECTION | Vertical Root
#Xle     Yle      Zle      chord    Ainc    Nspan    Sspace
0        0        0         0.236      0      10         1

NACA
0012

#Cname   Cgain    Xhinge   HingeVec   SgnDup
CONTROL
Rudder 1.0 0.7 0.0 0.0  1.0 1
#-------------------------------------------------------
SECTION | Vertical Tip
#Xle     Yle      Zle      chord    Ainc    Nspan    Sspace
0.094        0        0.33         0.141      0      10         1

NACA
0012

#Cname   Cgain    Xhinge   HingeVec   SgnDup
CONTROL
Rudder 1.0 0.7 0.0 0.0  1.0 1
test_geom
0.03                          	| Mach
0 0 0                            | iYsym  iZsym  Zsym
0.611   0.405   1.524	        | Sref   Cref   Bref
0.101   0   0               | Xcg   Ycg   Zcg
0.027                             | CD0

#==============================================================
SURFACE
Wing
#Nchordwise       Cspace   Nspanwise   Sspace
12                1.0      50          1.0

YDUP
0
ANGLE
0
TRANSLATE
0  0   0
#-------------------------------------------------------
SECTION | Wing Root
#Xle     Yle      Zle      chord    Ainc    Nspan    Sspace
0        0        0         0.472      0      50         1

NACA
0012

#Cname   Cgain    Xhinge   HingeVec   SgnDup
CONTROL
Flaps 1.0 0.7 0.131 0.938  0.0 1
#-------------------------------------------------------
SECTION | Wing Mid
#Xle     Yle      Zle      chord    Ainc    Nspan    Sspace
0.018        0.381        0         0.401      0      50         1

NACA
0012

#Cname   Cgain    Xhinge   HingeVec   SgnDup
CONTROL
Flaps 1.0 0.7 0.131 0.938  0.0 1
#Cname   Cgain    Xhinge   HingeVec   SgnDup
CONTROL
Ailerons 1.0 0.7 0.131 0.938  0.0 -1
#-------------------------------------------------------
SECTION | Wing Tip
#Xle     Yle      Zle      chord    Ainc    Nspan    Sspace
0.035        0.762        0         0.33      0      50         1

NACA
0012

#Cname   Cgain    Xhinge   HingeVec   SgnDup
CONTROL
Ailerons 1.0 0.7 0.131 0.938  0.0 -1
#==============================================================
SURFACE
Horizontal
#Nchordwise       Cspace   Nspanwise   Sspace
12                1.0      30          1.0

YDUP
0
ANGLE
0
TRANSLATE
1.067  0   0
#-------------------------------------------------------
SECTION | Horizontal Root
#Xle     Yle      Zle      chord    Ainc    Nspan    Sspace
0        0        0         0.251      0      30         1

NACA
0012

#Cname   Cgain    Xhinge   HingeVec   SgnDup
CONTROL
Elevator 1.0 0.7 0.0 1.0  0.0 1
#-------------------------------------------------------
SECTION | Horizontal Tip
#Xle     Yle      Zle      chord    Ainc    Nspan    Sspace
0.0        0.376        0         0.251      0      30         1

NACA
0012

#Cname   Cgain    Xhinge   HingeVec   SgnDup
CONTROL
Elevator 1.0 0.7 0.0 1.0  0.0 1
#==============================================================
SURFACE
Vertical
#Nchordwise       Cspace   Nspanwise   Sspace
12                1.0      10          1.0

YDUP
0
ANGLE
0
TRANSLATE
1.067  0   0
#-------------------------------------------------------
SECTION | Vertical Root
#Xle     Yle      Zle      chord    Ainc    Nspan    Sspace
0        0        0         0.236      0      10         1

NACA
0012

#Cname   Cgain    Xhinge   HingeVec   SgnDup
CONTROL
Rudder 1.0 0.7 0.0 0.0  1.0 1
#-------------------------------------------------------
SECTION | Vertical Tip
#Xle     Yle      Zle      chord    Ainc    Nspan    Sspace
0.094        0        0.33         0.141      0      10         1

NACA
0012

#Cname   Cgain    Xhinge   HingeVec   SgnDup
CONTROL
Rudder 1.0 0.7 0.0 0.0  1.0 1
test_geom
0.03                          	| Mach
0 0 0                            | iYsym  iZsym  Zsym
0.611   0.405   1.524	        | Sref   Cref   Bref
0.101   0   0               | Xcg   Ycg   Zcg
0.027                             | CD0

#==============================================================
SURFACE
Wing
#Nchordwise       Cspace   Nspanwise   Sspace
12                1.0      50          1.0

YDUP
0
ANGLE
0
TRANSLATE
0  0   0
#-------------------------------------------------------
SECTION | Wing Root
#Xle     Yle      Zle      chord    Ainc    Nspan    Sspace
0        0        0         0.472      0      50         1

NACA
0012

#Cname   Cgain    Xhinge   HingeVec   SgnDup
CONTROL
Flaps 1.0 0.7 0.131 0.938  0.0 1
#-------------------------------------------------------
SECTION | Wing Mid
#Xle     Yle      Zle      chord    Ainc    Nspan    Sspace
0.018        0.381        0         0.401      0      50         1

NACA
0012

#Cname   Cgain    Xhinge   HingeVec   SgnDup
CONTROL
Flaps 1.0 0.7 0.131 0.938  0.0 1
#Cname   Cgain    Xhinge   HingeVec   SgnDup
CONTROL
Ailerons 1.0 0.7 0.131 0.938  0.0 -1
#-------------------------------------------------------
SECTION | Wing Tip
#Xle     Yle      Zle      chord    Ainc    Nspan    Sspace
0.035        0.762        0         0.33      0      50         1

NACA
0012

#Cname   Cgain    Xhinge   HingeVec   SgnDup
CONTROL
Ailerons 1.0 0.7 0.131 0.938  0.0 -1
#==============================================================
SURFACE
Horizontal
#Nchordwise       Cspace   Nspanwise   Sspace
12                1.0      30          1.0

YDUP
0
ANGLE
0
TRANSLATE
1.067  0   0
#-------------------------------------------------------
SECTION | Horizontal Root
#Xle     Yle      Zle      chord    Ainc    Nspan    Sspace
0        0        0         0.251      0      30         1

NACA
0012

#Cname   Cgain    Xhinge   HingeVec   SgnDup
CONTROL
Elevator 1.0 0.7 0.0 1.0  0.0 1
#-------------------------------------------------------
SECTION | Horizontal Tip
#Xle     Yle      Zle      chord    Ainc    Nspan    Sspace
0.0        0.376        0         0.251      0      30         1

NACA
0012

#Cname   Cgain    Xhinge   HingeVec   SgnDup
CONTROL
Elevator 1.0 0.7 0.0 1.0  0.0 1
#==============================================================
SURFACE
Vertical
#Nchordwise       Cspace   Nspanwise   Sspace
12                1.0      10          1.0

YDUP
0
ANGLE
0
TRANSLATE
1.067  0   0
#-------------------------------------------------------
SECTION | Vertical Root
#Xle     Yle      Zle      chord    Ainc    Nspan    Sspace
0        0        0         0.236      0      10         1

NACA
0012

#Cname   Cgain    Xhinge   HingeVec   SgnDup
CONTROL
Rudder 1.0 0.7 0.0 0.0  1.0 1
#-------------------------------------------------------
SECTION | Vertical Tip
#Xle     Yle      Zle      chord    Ainc    Nspan    Sspace
0.094        0        0.33         0.141      0      10         1

NACA
0012

#Cname   Cgain    Xhinge   HingeVec   SgnDup
CONTROL
Rudder 1.0 0.7 0.0 0.0  1.0 1
